# S34)
3.
f(t) := 10000*1.035^t
20000 == f(t) solve, t → 20.148791684
# nach ca 20 Jahren verdoppelt sich die Einwohnerzahl
# Weil der Grundwert immer ändert
4.
f(t) := 100*0.5^(t/5730)
f(t) == 7.5 solve, t → 21412.8128546
f(t) == 0.1 solve, t → 57103.9439511
# 5. | steigt nicht gleichmäßig
h_0 == 40
116 == 40*a^40
a := nthroot(116/40, 40) = 1.02698
h(t) := 40*a^t
40*2 == h(t) solve, t → 26.0407698158
# die höhe der planze verdoppelt sich nach ca 26 Tagen
7.
N_0 := 100
N(t) := N_0*0.5^(t/60)
N_0 - N(1) = 1.1486
# 1.149%/Min
1 == N(t) solve, t → 398.631371386
N_0 := 1.5
N(t) := N_0*0.5^(t/60)
N(60) + N(30) + N(0) = 3.31066
# es befinden sich 3.311mg Nikotin im Körper
# Es wird nie 0 sein
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10.
14.
R(x) := 100*e^(-0.65*x)
B(x) := 100*e^(-0.02*x)
# [plot: B(x), R(x) vs x]
# das rote Licht wird schnell schwach,
# hingegen das blaue Licht noch stärker ist
# b)
Gr(x) := 100*e^(-0.025*x)
clear(a)
Gr(x) == 100*a^x solve, a → 0.975309912028
100 - Gr(10) = 22.1199  # Es gehen 22.12% Prozent
# c) | 4
# [plot: 100*0.5^(t/5) vs t]
15.
T(t) := 100*0.5^(t/3)
T(t) == 1 solve, t → 19.9315685693
# nach 19 Jahren ._.
clear(N)
N(t) := 100*e^(-0.0693*t)
100 - N(7) = 38.4364  # es hat um 38.436% abgenommen
