11.
S_K(t) := 16*t
S_E(t) := 36*(t - 0.5)
# [plot: S_E(t), S_K(t) vs t]
S_K(t) == S_E(t) solve, t → 0.9
# Sie überholt ihn nach 54min
12.
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# 13. | (a)
jim(t) := 10*t
renate(t) := 4*t
# [plot: jim(t), renate(t) vs t]
renate(t) == 10 solve, t → 5/2
# Renate braucht 2.5 Stunden nach Klessheim
(b)
# Erika geht konstant 2h lang, dann macht sie für 12 min eine Pause. Danach kommt sie schließlich nach 3,2h an.
# Fritz rennt rennt konstant 0,8h in eine Richtung und zurück rennt er 1,4h.
(c)
s_L(t) := 10 - 68/11*t
s_N(t) := 12.5*(t - 1)
s_L(t) == s_N(t) solve, t → 1.20437956204
# [plot: s_L(t), s_N(t) vs t]
# Sie treffen sich nach 1h 12min
14.
judith(t) := 23*t
eva(t) := 28*(t - 0.25)
judith(t) == eva(t) solve, t → 1.4
# Sie treffen sich um 10.24
15.
U(t) := 46000 - 250*t
# d ist der Startpunkt und k ist der durchschnittliche Abnahme
U(t) == 46000*0.7 solve, t → 55.2
# Nach 55.2 Jahren wurden erstmals 70% weniger Unfälle gemeldet
U(t) == 0 solve, t → 184
# Nach 184 Jahren
16.
# Es zeigt die mittlere Steigung der Seilbahn an
f(x) := (1712 - 1385)/(1382 - 1148)*x
atan((1382 - 1148)/(1712 - 1385)) = 0.621117
# Der Steigungwinkel beträgt 62.1°
17.
sqrt(2000^2 + 300^2) = 2022.37
atan(300/2000) = 0.14889
300/2000*100 = 15
18.
A_1(x) := 7*x
A_2(x) := 6*x + 50
# [plot: A_1(x), A_2(x) vs x]
A_1(100) = 700
A_2(100) = 650
A_1(x) == A_2(x) solve, x → 50
A_1(x) - 10 == A_2(x) solve, x → 60
A_1(x) + 10 == A_2(x) solve, x → 40
19.
h(x) := 30*x - 10
h(x) == 0 solve, x → 1/3
h(0) = -10
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