# 4. HÜ Quadratische Funktionen
# 3. Minirampe
f(x) := a*x^2 + b*x + c
[f(1.5) == 3; f(6.5) == 0; f'(1.5) == -1] → [c + 1.5*b + 2.25*a == 3.0; c + 6.5*b + 42.25*a == 0.0; b + 3.0*a == -1.0] solve, a, b, c → [0.08, -1.24, 4.68]
f_1(x) == 0.08*x^2 - 1.24*x + 4.68
# 4. Stromversorgung
f(x) := a*x^2 + b*x + c
[f'(-1) == -0.0875; f(-1) == 5; f(15) == 12] → [b - 2.0*a == -0.0875; c + (a - b) == 5; c + 15*b + 225*a == 12] solve, a, b, c → [0.0328125, -0.021875, 4.9453125]
f_1(x) == 0.0328125*x^2 - 0.021875*x + 4.9453125
h(x) := 3/50*x^2 - 14/5*x + 81/2
h'(x) == 0 solve, x → 70/3 = 23.3333
h(23.3333) = 7.83333
# Es ist bewiesen dass das Seil mindestens bis 7.833 hängt
h(25) = 8
8/cos(30°) = 9.2376
# Das Seil ist 9.238lang
# 5. Tennis
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# -14|10
# b)
f(x) := a*x^2 + b*x + c
[f(-10) == 0.75; f(10) == 0; f(0) == 1.25] → [c + (100.0*a - 10.0*b) == 0.75; c + 10*b + 100*a == 0; c == 1.25] solve, a, b, c → [-0.00875, -0.0375, 1.25]
f_1(x) := -0.00875*x^2 - 0.0375*x + 1.25
# c) es wird der höhste Punkt der Flugbahn berechnet
# 7. Kostenfunktion
K(x) := 0.1*x^2 + 6*x + 40
K'(x) == 0 solve, x → -30.0
# Fixkosten: 40
# sinnvoller Definitionsbereich: 0 - 30
# Monotnie: streng monoton steigend
# Krümmungsverhalten: progressiv steigend
# b)
K(x) == 150 solve, x → [-74.72135955; 14.72135955]
K(10) = 110
# [plot: K(x), K(10), K(14.72) vs x, 10, 14.72]
# 11. Wasserstrahl
h(x) := -0.15*x^2 + 0.9*x + 0.6
h(x) == 0 solve, x → [-0.605551275464; 6.60555127546]
# Der Strahl trifft bei 6.61m auf den Boden
h(x) + 5 == 0 solve, x → [-3.80685928555; 9.80685928555]
# ja der Auftrittsort verschiebt sich auf der x Achse
# b)
h(x) := a*x^2 + b*x + 1
[h'(3) == 0; h(3) == 2.5] solve, a, b → [-0.166666666667, 1.0]
h(x) := -0.166666666667*x^2 + x + 1
# c)
h_45(x) := a*x^2 + b*x
[h_45(6) == 0; h_45'(0) == 1] solve, a, b → [-1/6, 1]
h_45(x) := -1/6*x^2 + x
h'(0) → 1.0
h'(6) → -1.0  # Einfallswinkel = Ausfallswinkel
# 12. Flugbahn eines Skispringers
f(x) := a*x^2
-80 == a*117^2 solve, a → -80/13689 = -0.00584411
# Wenn sich a verringert dann wird die fluglänge verkürzt
# 13. Gewinnfunktion
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# Kurve nach unten offen daher muss -0.5 < 0
# Schnittpunkt bei -12.000
# Hochpunkt > 0 daher 300
# 1. skizziere
# a)
f(x) := 2*(x - 1)^2 - 3
# [plot: f(x) vs x]
# b)
f(x) := -(x - 3)^2 + 1
# [plot: f(x) vs x]
# c)
f(x) := 0.5*(x + 1)^2
# [plot: f(x) vs x]
# d)
f(x) := -3*x^2 + 2
# [plot: f(x) vs x]
# e)
f(x) := (x - 2)^2 - 1
# [plot: f(x) vs x]
# f)
# [plot: f(x) vs x]
f(x) := 2*(x + 2)^2 - 2
# g)
f(x) := 1/(x - 2) + 1
# [plot: f(x) vs x]
# 2a)
f(x) := x^3 + 2*x^2 - x + 1
g(x) := (x - 3)^3 + 2*(x - 3)^2 - x + 3
# [plot: f(x), g(x) vs x]
# b)
f(x) := x^4 + 3*x^2 + 2*x
g(x) := (x + 2)^4 + 3*(x + 2)^2 + 2*(x + 2) + 1
# [plot: f(x), g(x) vs x]
# c)
f(x) := 2*x^2 + 3*x + 1
g(x) := 2*(x - 1)^2 + 3*(x - 1) - 2
# [plot: f(x), g(x) vs x]
# d)
f(x) := -2*x + 1
g(x) := -2*(x + 2) + 4
# [plot: f(x), g(x) vs x]
# 3a)
# Um an der x-Achse zu spiegeln muss man die funktion mit -1 multiplizieren
# Um an der y-Achse zu spiegeln muss man x mit -1 multiplizieren
# b)  Ursprugsfunktion  An der y-Achse gespiegelt  An der x-Achse gespiegelt
f(x) := x^2 + 2*x - 1
f(x) := -1*(x^2 + 2*x - 1)
f(x) := -x^2 + 2*(-x) - 1
f(x) := 3*x - 2
f(x) := -1*(3*x - 2)
f(x) := 3*(-x) - 2
f(x) := x^4 + 2*x^2 + 1
f(x) := -1*(x^4 + 2*x^2 + 1)
f(x) := -x^4 + 2*(-x)^2 + 1
# 4)
f(x) := a*x^2 + b*x + c
f(x) := ax^2 + 2*abx + c - b^2
# a bleibt gleich, wobei man b mit 2a multiplizieren muss und b mit a*b*b addiert werden muss
# 5)
# a ist beim 2. Diagramm größer
#
# c > 0 trifft beim 1. zu da der schnittpunkt mit der y-Achse bei 3 liegt
#
# beide c sind positiv
# 8)
# Die Steigung verändert sich um das a fache
# wenn c ungleich 0 verschiebt sich das Diagramm um das a fache nach obern
# da sich der Flächeninhalt beider seiten ausgleichen ist das ergebnis 0
integral(a*(8/9*x^3 - 8/9*x) - 8/9*x^3 + 8/9*x, x = 0 .. 1) == 0.2 solve, a → 0.1
