# Kapitelüberschrift
2.
# symbolisch  nummerisch
a.
1 + 3/4 → 7/4  # a.
1 + 3/4 = 1.75
b.
2 - (3 + 4)/2 → -3/2  # b.
2 - (3 + 4)/2 = -1.5
c.
sqrt(2^2 + (5 + 25)/6) → 3  # c.
sqrt(2^2 + (5 + 25)/6) = 3
d.
1/((2 - 3)*2) + 5 → 9/2  # d.
1/((2 - 3)*2) + 5 = 4.5
e.
sqrt(-1) → 1i  # e.
sqrt(-1) = 1i
3.
z := -4
z = -4
clear(z)
z =  # error: Diese Variable ist nicht definiert. Prüfen Sie, ob die Beschriftung richtig festgelegt ist.
4.
a.
3 - 3/4*x == 4 solve, x → -4/3
b.
x^2 + 3*x - 4 == 0 solve, x → [1; -4]
c.
x^3 + x^2 == 0 solve, x → [0; 0; -1]
d.
5*2^x - 3*4^(x - 1) == 2*5^x solve, x → 0.696139602261
e.
sin(x) == cos(x) solve, x → -(3*π)/4
5.
a.
1/f == 1/g + 1/b solve, b → f*g/(g - f)
b.
x == a + (b - a)/h*z solve, a → (b*z - h*x)/(z - h)
6.
a.
[2*x + 3*y - z == -3; -5*x + 7*y + 4*z == 25; x - 2*y + 3*z == 2] solve, x, y, z → [-2, 1, 2]
b.
[x^2 + y^2 == 10; 2^x + 3*y == 6] solve, x, y →  # error: Keine Lösung gefunden.
7.
a.
4*x^3 + 5*x^2 - 6*x + 3*x^2 + x^3 simplify → x*(5*x^2 + 8*x - 6)
b.
(a + b)^2 simplify → (b + a)^2
c.
a^2 + 2*ab + b^2 factor → b^2 + 2*ab + a^2
d.
2*x + (3*x - 4)^2 + 5*x - 4*x^2 simplify → 5*x^2 - 17*x + 16
e.
2/(x^2 + 3*x - 4) parfrac → 2/(5*(x - 1)) - 2/(5*(x + 4))
f.
x := -1
2*x + (3*x - 4)^2 + 5*x - 4*x^2 → 38
clear(x)
g.
(6*a^2 - 5)/(a^2 - 9) + 8*a/(a + 3) simplify → -(24*a - 121)/(a^2 - 9) + 14
h.
f(x) := cos(x)
f(x) series, 8 → 1 - 1/2*x^2 + 1/24*x^4 - 1/720*x^6
clear(f(x))  # error: Ein Variablenname wird hier benötigt.
8.
a.
f(x) := x^2 - 2*x - 3
# [plot: f(x) vs x]
b.
f(x) := sin(x)
# [plot: f(x) vs x]
f(x) → sin(x)
9.
f(x) := x^3
g(x) := x^2 + 2*x
f(x) == g(x) solve, x → [0; 2; -1]
# [plot: f(x), g(x) vs x]
10.
table  # each column defines a variable
    X | K(x) (1000 ¤)
    10 | 11
    20 | 20
    30 | 28
    40 | 38
    50 | 43
end table
11.
f(x) := 3*x^3 + 2*x + 4
d/dx(f(x)) → 9*x^2 + 2
integral(f(x), x = 3 .. 5) → 432
12.
clear(x)
f(x) := a*x^3 + b*x^2 + c*x + d  # error: Diese Variable ist nicht definiert. Prüfen Sie, ob die Beschriftung richtig festgelegt ist.
[f(3) == -2; f'(1) == 0; f'(3) == 2; f(1) == -2] → [d + 3*c + 9*b + 27*a == -2; c + 2*b + 3*a == 0; c + 6*b + 27*a == 2; d + c + b + a == -2] solve, a, b, c, d → [1/2, -5/2, 7/2, -7/2]
13.
σ := 25
µ := 1.5
G(x) := pnorm(x, σ, µ)
a.
G(23.9) = 0.231678
b.
1 - G(26.35) = 0.18406
c.
qnorm(0.96, σ, µ) = 27.626
14.
A := [45, 89, 78, 67, 66, 89, 73, 92, 74]
mean(A) = 74.7778
stdev(A) = 13.9027
Stdev(A) = 14.746
median(A) = 74
15.
A := [1, 3, 4; -2, 0, 1; 2, 1, 5]
A^-1 = [-0.037037, -0.407407, 0.111111; 0.444444, -0.111111, -0.333333; -0.0740741, 0.185185, 0.222222]
A^-1 → [-1/27, -11/27, 1/9; 4/9, -1/9, -1/3; -2/27, 5/27, 2/9]
A*A^-1 = [1, 0, 0; 0, 1, 0; 0, 0, 1]
clear(A)
A := [1, 2, 3; -2, 1, 2]
B := [-1, 2, 1, 5; 0, 2, 3, 1; 3, 2, 6, 1]
A*B = [8, 12, 25, 10; 8, 2, 13, -7]
A*B → [8, 12, 25, 10; 8, 2, 13, -7]
