# 2. HÜ - Funktionen graphisch darstellen
1.
f(x) := -0.35*x^3 + 0.45*x^2 + 0.075*x + 0.0075
table  # each column defines a variable
    y | G(y)
    0 | 0
    0.2 | 0.04
    0.4 | 0.09
    0.6 | 0.15
    0.8 | 0.2
    1 | 0.23
end table
# [plot: f(x), G(y) vs x, y]
# Die Werte stimmen nicht genau überein
2.
h_1(t) := 0.08*e^(0.03*t)
h_2(t) := 1.2 - 1.8836*e^(-0.01595*t)
h(t) :=
    if 0 ≤ t < 55
        h_1(t)
    else if t ≥ 55
        h_2(t)
# [plot: h(t), h(40) vs t, 40]
3.
f(x) :=
    if x ≤ -1
        -2*x - 1
    else if -1 < x < 1
        x^2 - 1
    else
        sqrt(x - 0.92) - 0.28
# [plot: f(x) vs x]
g(x) :=
    if 0 ≤ x < 6
        -0.5*x + 6
    else if 6 ≤ x < 15
        1.5*x - 6
    else if 15 ≤ x < 24
        -x + 31.5
# [plot: g(x) vs x]
4.
T(t) := 24 + 66*e^(-0.1*t)
T(15) = 38.7266
# [plot: T(t), T(15) vs t, 15]
# Der Tee ist 28.72° heiß.
5.
i_C(t) := 0.3*e^(-t/(30000*470*10^-9))
# [plot: i_C(t) vs t]
