# 1a)
[20*x + 17*y == 111.6; 30*x + 12*y == 129.6] solve, x, y → [3.2, 2.8]
# 1b)
N(t) := 939*e^(0.00995*t)
# 1) A: 939 ist der Umsatz am 1.Mai
N(7)/N(0)*100 = 107.213
# 2) A: der Umsatz steigt um 7.12% pro Tag
# 1c) | 1) Der Schnittpunkt ist der Break-Even-Point
# 2)
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# 2a)
# 1) Wir brauchen die Fläche unter der Funktion (Integral), da es ca 2.5 Kästchen und ein Kästen 100 MB ist, beträgt die Größe des noch herunterzuladenden Programms ca 250MB
# 2) Nach 15 Sekunden war die Downloadrate um 21Mb/s schneller als nach 5 Sekunden
# 2b) | (1)
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atan(1/0.5) = 63.4349 deg
α := 180 - 2*63.435 = 53.13
# A: α beträgt 53.13°
(2)
a := 62/15.5 = 4  # m ist 0.02m lang
m := sqrt(4) = 2
# c)
a := n*0.7*8/9  # error: Diese Variable ist nicht definiert. Prüfen Sie, ob die Beschriftung richtig festgelegt ist.
# d)
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# 3a)
clear(a)
6.3/12 = 0.525  # cm
0.525 == a^2/4*sqrt(3) assume, a > 0; solve, a → 1.1011065186
# a beträgt 1.21 cm
# 3b)  A: da es für einen x Wert mehr als einen y Wert gibt
# 3c)
V := ((d/2)^2*π*2 - A)*2*h  # error: Diese Variable ist nicht definiert. Prüfen Sie, ob die Beschriftung richtig festgelegt ist.
# 3d)
Esslöffel := 1*10^1
# 4a) | 1) A: Steigung beträgt 2
# 2) Die Sekante von 0 bis 7 stellt die durchschnittliche Steigung, also den Differenzenquotient, im Sachzusammenhang sagt es aus wie viel Wasser durchschnittlich in die Tonne kommt
# 3)
f(x) := 1/4*x^2
# [plot: f(x) vs x]
# 4b)  1)
r(t) := 0.038*t^3 - 0.7*t^2 + 3.15*t + 1
W := r''(t) == 0 solve, t → 6.14035087719
# 2)
integral(r(t), t = 1.3 .. 5) = 17.6696
A := 17.67 - 4*(5 - 1.3) = 2.87
# 5a)
a(t) := 0.000005*t^3 - 0.003359*t^2 + 0.528735*t + 8.08
a(t) == 0 solve, t; assume, t == real → -14.0089906804
integral(a(t), t = 0 .. 600) == 11700 solve, t; assume, t == real → 1.0
# 5b)
# der Rechenfehler befindet sich im ersten Rechenschritt,
# wenn man 10^11 mit zwei potenziert ergibt das 22 nicht 121
# 5c)
400/1.5 = 266.667  # Watt/m
