# 1a)  1)
g(x) := -0.3*x^2 + 1.7 m - 20 cm → -0.3*x^2 + (1.7*m - 20.0*cm)
1.7*m - 20.0*cm = 1.5 m
# 2)
A := integral(g(x), x = -0.75 .. 0.75) - 1.5*a  # error: Diese Variable ist nicht definiert. Prüfen Sie, ob die Beschriftung richtig festgelegt ist.
# b)
2*11.99/1.2 = 19.9833
# c)
γ := atan(a/(2/(b/4)))  # error: Diese Variable ist nicht definiert. Prüfen Sie, ob die Beschriftung richtig festgelegt ist.
# 2a) | 1)
V(r) := 4/3*π*r^3
r_1 := 3 cm
r_2 := 2.6 cm
V(r_1) - V(r_2) = 39.4752 cm^3
V := 39.475 cm^3 = 0.039475 L
# 2)
masse := V*(1300 gm/L) = 0.0513175 kg
masse*10000 = 513.175 kg
# b)
[2*a + b == 100; 16*a + 12*a + 8*b == 1340] solve, a, b → [45, 10]
# c)
K'(x) := 15/40*x^2 - 9*x + 70
# [plot: K'(x) vs x]
K(x) := integral(K'(x), x) → x^2*(x - 36)/8 + 70*x
K(10) = 375
K(x) := x^2*(x - 36)/8 + 70*x + 125
K(10) = 500
# 3a) | 1) | 1200
# 2) nach 3.5 Monaten
# 3)
3.5 == 2/3*x solve, x → 5.25
# b) | 1)
asin((60 - 17)/100) = 25.4676 deg
# 2)
tan(8.3 deg)*100 = 14.5884
# 4a)
M(x) := 31*x^2/2
M(1) = 15.5
62/15.5 = 4
M(2) = 62
clear(x, d)
h(x) := -0.00028*x^3 + 0.05105*x^2 - 2.26761*x + d  # error: Diese Variable ist nicht definiert. Prüfen Sie, ob die Beschriftung richtig festgelegt ist.
f(x) := -0.68426*x + 116.326
ankatete := f(x) == 0 solve, x → 170.002630579
atan(116.326/ankatete) = 0.600084
h'(x) == -0.68426 solve, x → [18.247165548; 103.3004535]
d := h(103.3) == f(103.3) solve, d → 43.78194286
h(x) := -0.00028*x^3 + 0.05105*x^2 - 2.26761*x + d
h'(x) == 0 solve, x → [29.2473094049; 92.3003096428]
h''(92.3003096428) = -0.0529645
h''(29.2473094049) = 0.0529645
